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# Shaft Sizing
Mt := 540 N*m
n := 200 rpm
d := 50 mm
F_t2 := 5714 N
F_t3 := 15211 N
F_r2 := 2100 N
F_r3 := 5590 N
# Note do calculate Ma, do enlarge shaft
# In order to match the diagram. Cum fixam rulementi?
461.90 - 310.4 = 151.5
F_a2 := 803 N
F_a3 := 2137 N
# According to the table for End Shaft Sizing, in order to correspond with both the diameters and the Mt value,
# d = 50mm will be chosen.
τ_at := 15 MPa
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d_endshaft := 50 mm
d_tentative := nthroot(16*Mt/(π*τ_at), 3) = 56.8099 mm
# Diameters of the gears in point 2 and point 3
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d_3 := 2*Mt/F_t3 = 71.0012 mm
d_2 := 2*Mt/F_t2 = 189.009 mm
# Lengths for the strength calculation according to the points provided in the Figure above
l_1 := 0.7*d = 35 mm
l_2 := 1.6*d = 80 mm
l_3 := 0.8*d = 40 mm
l_4 := 1*d = 50 mm
l_5 := 0.8*d = 40 mm
l_2A := l_1/2 + l_2 = 97.5 mm
l_A3 := l_3 + l_4/2 = 65 mm
l_3B := l_4/2 + l_5 = 65 mm
l_total := l_2A + l_A3 + l_3B = 227.5 mm
# Strength calculation
# Horizontal Plane
# If ΣM_A = 0, then we find H_B
# If ΣM_B = 0, then we find H_A
# Clockwise positive
M_a2 := F_a2*d_2/2 = 75.8873 Newton_meter
H_B := (-F_t3*l_A3 - F_r2*l_2A - M_a2)/(l_A3 + l_3B) = -9764.25 N
H_A := (F_r2*l_total - F_t3*l_3B + M_a2)/(l_A3 + l_3B) = -3346.75 N
# Verification of Horizontal Plane
-H_B - H_A = 13111 N
F_t3 - F_r2 = 13111 N
# Vertical Plane
# If ΣM_A = 0, then we find V_B
# If ΣM_B = 0, then we find V_A
# Counterclock wise positive
M_a3 := F_a3*d_3/2 = 75.8648 Newton_meter
V_B := (-F_t2*l_2A - F_r3*l_A3 - M_a3)/(l_A3 + l_3B) = -7664.08 N
V_A := (((-F_r3*l_3B + F_t2*l_total) + M_a3)/(l_A3 + l_3B)) = 7788.08 N
# Verification of Vertical Plane
F_t2 - F_r3 = 124 N
V_A + V_B = 124 N
# Diagram calculation
# Horizontal (OZ axis):
M_H2left := 0
M_HAleft := -M_a2 - F_r2*l_2A = -280.637 Newton_meter
M_H3right := H_B*l_3B = -634.676 Newton_meter
# Vertical (OY axis):
M_V2left := 0
M_VAleft := -F_t2*l_2A = -557.115 Newton_meter
M_V3right := V_B*l_3B = -498.165 Newton_meter
# ! Jump at M_3
M_V3right + M_a3 = -422.3 Newton_meter
# Combined (Mb) diagram:
CM_b2 := sqrt(M_a2^2 + 0^2) = 75.8873 Newton_meter
CM_b3jump := sqrt(M_H3right^2 + (M_V3right - M_a3)^2) = 855.759 Newton_meter
CM_bA := sqrt(M_HAleft^2 + M_VAleft^2) = 623.806 Newton_meter
CM_b3 := sqrt(M_H3right^2 + M_V3right^2) = 806.835 Newton_meter
# Total Axial Force of the axis
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F_a := F_a2 + F_a3 = 2940 N
# Reactions in each bearing
R_A := sqrt(H_A^2 + V_A^2) = 8476.73 N
R_B := sqrt(H_B^2 + V_A^2) = 12489.8 N
# Bearing Calculation
# Calculation Factors: f_0_seriesnumber , k_r_seriesnumber ,e ,X , Y dimensionless, from the catalogue
# Inside diameter: d_seriesnumber [mm]
# Basic loading ratings: C_serialnumber [N] for dynamic, C_0__serialnumber [N] for static
# Fatigue load limit: P_U__serialnumber [N]
# Note: e is the limit for the load ratio depending on the relationship r = (f_0* F_a)/C_0
# Roller bearings
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# According to our initial shaft figure F_a is loaded
# towards the right therefore the bearing A is loaded meaning that the bearing calculations will focus on the bearing A.
# Bearing A
F_a/R_A = 0.346832
# Calculation 1 will be done considering the bearing SKF Explorer 6012
d_6012 := 60 mm
C_6012 := 30.7*10^3*N = 30700 N
C_0_6012 := 23.2*10^3*N = 23200 N
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f_0_6012 := 15.6
k_r_6012 := 0.025
P_U_6012 := 0.98*10^3*N = 980 N
# Assuming normal cleareance
r_6012 := f_0_6012/C_0_6012*F_a = 1.9769
e_6012 := 0.34
X_6056 := 0.56
Y_6056 := 1.31
# Since e < than all F_a/F_r values
# Therefore:
# Bearing A
# X = Y = 0
# P = F_r * V
# V  is rotation factor = 1 Therefore P = F_r
F_a/R_A = 0.346832
P_A_6012 := R_A = 8476.73 N
P_B_6012 := R_B = 12489.8 N
# Life calculation
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# Formula has been adapted to
# L_h= (L * 10^6 ) / (60^(-1 *) n)
# because it assumes the final result will be presented in [hr] and that n is dimensionless, but dimension analysis proves the final result will be in [min], thus 60 has been replaced with 60^-1 to represent the result in a familiar and accurate manner.
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p_6012 := 3
L_B := (C_6012/P_B_6012)^p_6012 = 14.8508
L_A := (C_6012/P_A_6012)^p_6012 = 47.5041
L_H_A := L_A*10^6/(60^-1*n) = 37802.5 hr
L_H_B := L_B*10^6/(60^-1*n) = 11817.9 hr
# Typical life is 10000 to 50000 hours therefore 6012 SKF Explorer is suitable for the task, but there is a significant life difference which is bothersome for maintenance.
# Tapered roller bearings calculation
F_a3 = 2137 N
e_33012 := 0.33
Y_33012 := 1.8
Y_0_33012 := 1
C_33012 := 113*10^3*N = 113000 N
# X Configuration Calculation
# Chosen Bearing: SKF Explorer 33012
# TOWARDS
# Point 2 positive
# <------ F is positive
F_asA_X := 0.5*R_A/Y_33012 = 2354.65 N
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F_asB_X := 0.5*R_B/Y_33012 = 3469.38 N
R_a_X := F_a3 - F_asA_X + F_asB_X = 3251.74 N
# R.a is <---- therefore B -> A (A supports the load)
F_aB_X := F_asB_X = 3469.38 N
F_aA_X := F_a3 + F_asB_X = 5606.38 N
F_aA_X/R_A = 0.661386
e_33012 = 0.33
P_B_X := R_B = 12489.8 N
P_A_X := 0.4*R_A + Y_33012*F_aA_X = 13482.2 N
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L_33012_B_X := (C_33012/P_B_X)^(10/3) = 1543.16
L_33012_A_X := (C_33012/P_A_X)^(10/3) = 1195.99
L_h_33012_A_X := L_33012_A_X*10^6/(60*n) = 264.372 hr
L_h_33012_B_X := L_33012_B_X*10^6/(60*n) = 341.114 hr
# Typical life is 10000 to 50000 hours therefore SKF Explorer 33012 is ABOVE AND BEYOND for the task in X Configuration
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# O Configuration Calculation
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F_asA_O := 0.5*R_A/Y_33012 = 2354.65 N
F_asB_O := 0.5*R_B/Y_33012 = 3469.38 N
R_a_O := F_a3 + F_asA_O - F_asB_O = 1022.26 N
# R.a is <---- therefore B -> A (A supports the load)
F_aB_O := F_asB_O = 3469.38 N
F_aA_O := F_a3 + F_asB_O = 5606.38 N
F_aA_O/R_A = 0.661386
F_aB_O/R_B = 0.277778
e_33012 = 0.33
P_B_O := R_B = 12489.8 N
P_A_O := 0.4*R_A + Y_33012*F_aA_O = 13482.2 N
L_33012_A_O := (C_33012/P_A_O)^(10/3) = 1195.99
L_33012_B_O := (C_33012/P_B_O)^(10/3) = 1543.16
L_h_33012_A_O := L_33012_A_O*10^6/(60*n) = 951739 s
L_h_33012_B_O := L_33012_B_O*10^6/(60*n) = 1228010 s
# Typical life is 10000 to 50000 hours therefore SKF Explorer 33012 is ABOVE AND BEYOND for the task in O Configuration, however the resultant axial force is lower in O configuration, this solution is better than the X Configuration.
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